# AguaClara Design Tool
# [reference: BasicClientInputs.xmcd]
# [reference: ExpertClientInputs.xmcd]
# [reference: DesignAssumptions.xmcd]
# [reference: MathFunctions.xmcd]
# [reference: PipeDatabase.xmcd]
# [reference: MinorLossCoefficients.xmcd]
# [reference: FluidsFunctions.xmcd]
# [reference: Sedimentation Tank.xmcd]
# [reference: Floc Hopper - New Design.xmcd]
# [reference: FCM.xmcd]
# [reference: Flocculator 3.xmcd]
# [reference: RapidMixer.xmcd]
# [reference: EntranceTankDim.xmcd]
# [reference: Materials List.xmcd]
# [reference: AutoCADMasterProgram.xmcd]
# This file must have at least one variable displayed otherwise it doesn't recalculate and it claims that all variables are undefined.
H_SedFrameWall = 0
EN_DrillSeries = 0
EN_PipeSpec = 8
L_Sed = 12.5 m
EN_FcmTube = 0
AC_SedTank = [
    "_-view o t"; "-layer m tank"; "c t 132,132,132"; "tank"; "  "; "_-view o t _zoom w 0.16,-0.16,0 -12.66,2.16,1.59733 _box 0,0,0 -12.5,2,1.59733 _box 0.15,-0.15,-0.15 -12.65,2.15,1.59733 _subtract 0.15,-0.15,-0.15  0,0,0 "; "-layer s 0"; "  "; "-layer f tank"; "  "
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]
AC_FlocTank = [
    "-layer m floctank";
    "c t 91,91,91";
    "floctank";
    "  ";
    "_-view o t _zoom w 0.16,1.99,0 -12.66,4.06229,1.87885 _box 0,2.15,0 -12.5,3.90229,1.87885 _box 0.15,2,-0.15 -12.65,4.05229,1.87885 _subtract 0.15,2,-0.15  0,2.15,0 ";
    "_box -12.65,2.6341,0 0.15,2.7841,1.87885";
    "_box -0.51,2.6341,0.52468 0,2.7841,0";
    "_subtract -12.65,2.6341,0  -0.51,2.6341,0.52468 ";
    "_box -12.65,3.26819,0 0.15,3.41819,1.87885";
    "_box -12.5,3.26819,0.50308 -12.26143,3.41819,0"
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]
