# AguaClara Water Treatment Plants
# Automated Design
# Add variable descriptions next to every varible so it is easy to interpret what this all means.
# User Inputs:
# AutoCAD References
# Design References
# [reference: BasicInputs.xmcd]
# Use BasicClientInputs and ExpertClientInputs when this is run by LabVIEW.
# Use BasicInputs and ExpertInputs to use the program in MathCAD
# Change the reference by
# - right clicking
# - select properties
# - reference tab
# - type in the correct file name
# [reference: ExpertInputs.xmcd]
# [reference: DesignAssumptions.xmcd]
# [reference: MathFunctions.xmcd]
# [reference: PipeDatabase.xmcd]
# [reference: MinorLossCoefficients.xmcd]
# [reference: FluidsFunctionsWORKING.xmcd]
# Sed Tanks and Slopes:
# [reference: Influent Sed Manifold.xmcd]
N_SedTanks = 3
B_SedPort = 4.69172 cm  # Height of the narrowest part of the manifold ports
W_SedPort = 4.69172 cm
H_SedBetween = 0 cm  # Distance from the top of the inlet manifold to the bottom of the ledge supporting the lamella frame
L_Sed = 19.0564 m
N_SedBays = 1  # Number of bays of inlet manifolds in each sed tank
A_SedPort = 22.0122 cm^2  # Port Area
L_SedPort = 5.41753 cm  # Length of the port through which water exits the inlet manifold
W_SedSludgeFlat = 5 cm  # Distance between tips of manifold plates (space alloted for the drain holes
W_SedSlopePlate = 30 cm  # Width of ferrous cement plates in whice one manifold port is cut
AN_SedTopInlet = 60 deg  # Angle of the top of the inlet manifold
Q_SedBay = 16.6667 L/s
42.5
AN_SedBottom = 10 deg  # Angle of the bottom of inlet manifold
L_SedSlopeManifold = 0.960218 m
# This is the extra distance between the last slope and the wall
W_SedBayActual = 1.0795 m
# Sedimentation Tank Sludge Drain:
# [reference: SludgeDrain.xmcd]
N_SedSludgeOrifices = 127  # per cell
W_SedSludge = 22.7864 cm  # Width of the sludge channel
Ti_SludgeDrain = 30 min  # Tank Drain time
H_SedSludge = 11.3932 cm  # Depth of the sludge channel
B_SedSludgeOrifices = 15 cm  # Distance center to center between drain orifices
T_SedSludge = 7.4641 cm
# Thickness of the plate topping the sludge channel
# through which drain holes are formed
D_SedSludgeOrifice = 0.0127 m  # Diameter of drain orifices
T_SedSludge = 7.4641 cm
N_SedSludgeOrifices = 127
W_SedDrainCover = 19.2376 cm
ND_SedSludgeValve = 6 in
W_SedInletBottom = 0.443562 m
# Sedimentation Tank Dimensions:
# [reference: Sedimentation Dimensions.xmcd]
Z_SedSludge = 0.188573 m  # Height from 0 of the top of the sludge drain
H_SedBottomSlope =  # error: This variable is undefined.  # Height of the bottom slope
H_SedTopSlope = 0.831573 m  # Height of the top of the inlet manifold
Z_SedSlopes = 1.02015 m  # Height from 0 of the top of the inlet manifold
# Total tank wall height
W_Sed = 1.0795 m  # Total tank width
L_Sed = 19.0564 m  # Total tank length
# Inlet Channel:
# Note H.SedManifoldPort is defined in the lamella program, but it must be defined up here first in order to calculate the HW.Sed
# [reference: Inlet Channel.xmcd]
HW_InletChannel = 0.695511 m
# Width of the drop chimneys connecting channel to sed inlet manifolds
H_SedManifoldPort := 2*(A_SedManifoldEntrance + 0.5*H_SedBottomSlope*W_SedInlet)/W_SedManifoldPort
W_InletChannel = 0.695511 m  # length of drop chimmneys
L_Channel = 3.8385 m
W_SedManifoldEntrance = 0.293412 m
L_SedManifoldEntrance = 0.291162 m
H_SedManifoldPort = 0.562753 m  # Ports at bottom of inlet chimney are set to be triangles
W_SedManifoldPort = 0.378509 m
N_SedInletPipes = 2  # per sed bay
H_InletChannel = 0.795511 m
# Sedimentation Tank Effluent Launder:
# [reference: Launder.xmcd]
N_SedLaunderOrifices = 350  # Number of orifices per launder
# How many launders per cell?
# What is the spacing of the orfices?
# How many rows of orifices per launder?
Q_SedLaunderOrifices = 1.42857 L/min
B_SedLaunderOrifices = 0.1 m  # Center to center launder spacing
# Exit Channel:
# [reference: Exit Channel.xmcd]
# More Launder Dimensions
W_ExitChannel = 0.695511 m
ND_SedLaunder = 8 in
H_ExitChannel = 0.795511 m
L_SedLaunder = 17.5154 m
L_ExitChannel = 3.8385 m
H_PltWeir = 0.561135 m  # height of the weir carrying water to the distribution tank
D_SedLaunderOrifice = 0.3125 in
HW_ExitChannel = 0.655511 m
# height from 0 of the launder
# water height in exit channel from 0
# Lamella:
# [reference: Lamella.xmcd]
L_SedPlate = 0.332509 m
42.5 in = 1.0795 m
B_SedPlate = 2.08678 cm  # center to center distance between lamella
S_SedPlate = 1.7 cm  # spacing between lamella
N_SedPlates = 715  # Number of Sed Plates per Sedimentation Tank Bay.
2*1.9*in = 0.09652 m
AN_SedPlate = 60 deg
ZW_ExitChannel = 1.572 m
V_SedC = -4776.59 m/day
L_SedActive = -0.0294915 m  # T
V_SedUp = 70 m/day
Z_SedLaunder = 1.46246 m
H_SedPlate = 0.166255 m
H_SedAbove = 0.259075 m  # Height of water needed above the lamella
HW_Sed = 1.612 m
N_SedPlates = 715
H_Sed = 1.712 m
Z_Mp = 0.916485 m
N_SedPorts = 60  # Per manifold
H_SedBayDivider = 1.09015 m
W_SedBayDivider = 0.15 m
W_SedSlopePlateRemaining = 1.05644 m
# Sedimentation Tank Floc Hopper:
# [reference: Floc Hopper.xmcd]
A_FlocHopper = 5.184 m^2
L_FlocHopper = 4.80222 m  # Length of the hopper cement plate
L_FlocHopperOffset = 0.166255 m  # distance from the edge of the channel to the bottom of the first lamella (collection distance)
W_FlocHopper = 1.0795 m  # width of the hopper set within each bay
# Flow Controller:
# [reference: FCM.xmcd]
N_Fcm = 6
ID_FcmTube = 4.318 mm
ID_FcmTube = 0.17 in
L_FcmTube = 257.56 cm
Q_FcmTubeMax = 375 mL/min
HL_FcmValve = 26.1265 cm
# Flocculator: | Look at Flocculator Positioning arrays
# [reference: Flocculation Energy Dissapation.xmcd]
W_FlocChannel = 0.560732 m
# Fill last channel with bafffles from last channel
# Fix port width to be based on energy dissipation in that channel
L_FlocTank/N_FlocChannels = 19.0564 m  # Adjust spacing after the number of baffles per channel is known.
ED_Floc = [20; 2] mW/kg
# Check the residence time of the flocculator should be at least 20minutes
HW_FlocEnd = 1.612 m
X_FlocBaffles = [
    0.39401, 0.755685, 0.82802;
    0.82802, 1.55137, 1.69604;
    1.26203, 2.34706, 2.56406;
    1.69604, 3.14274, 3.43208;
    2.13005, 3.93843, 4.3001;
    2.56406, 4.73411, 5.16812;
    2.99807, 5.5298, 6.03614;
    3.43208, 6.32548, 6.90416;
    3.86609, 7.12117, 7.77218;
    4.3001, 7.91685, 8.6402
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] m
L_FlocBaffles = [
    1.89777, 1.53609, 1.46376;
    1.21799, 0.856311, 0.783976;
    1.89777, 1.53609, 1.46376;
    1.21799, 0.856311, 0.783976;
    1.89777, 1.53609, 1.46376;
    1.21799, 0.856311, 0.783976;
    1.89777, 1.53609, 1.46376;
    1.21799, 0.856311, 0.783976;
    1.89777, 1.53609, 1.46376;
    1.21799, 0.856311, 0.783976
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] m
Z_FlocBaffles = [
    0.39401, 0.755685, 0.82802;
    0, 0, 0;
    0.39401, 0.755685, 0.82802;
    0, 0, 0;
    0.39401, 0.755685, 0.82802;
    0, 0, 0;
    0.39401, 0.755685, 0.82802;
    0, 0, 0;
    0.39401, 0.755685, 0.82802;
    0, 0, 0
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] m
N_FlocChannels = 3
L_FlocTank = 57.1693 m
HL_Floc = 57.9781 cm
HW_FlocStart = 2.19178 m
S_FlocBaffle = [39.401; 75.5685; 82.802] cm
B_FlocBaffle = [43.401; 79.5685; 86.802] cm
N_FlocChannelBaffles = [43; 23; 21]
W_FlocPort = [0.34401; 0.705685; 0.77802] m
HL_FlocChannels = [45.9597; 6.81505; 5.20332] cm
L_FlocBaffleLower = [1.21799; 0.856311; 0.783976] m
L_FlocBaffleUpper = [1.89777; 1.53609; 1.46376] m
H_FlocPort = [0.642231; 0.600461; 0.596767] m  # residence time of the flocculator
Ti_Floc = 17.2251 min
N_FlocBaffles = 87
# Rapid Mix Unit and Entrance Tank:
# [reference: RapidMixer.xmcd]
L_Et = 2.48424 m
H_Et = 2.78814 m
W_Et = 2.48424 m
# Need to add this variables to the VNG
# Assumptions: To be moved to basic inputs file
W_EtOrifice[30] = 0.031 m  # Height of Entrance Tank Orifice
# Calculations
L_trueET[30] = 1.29264 m  # Length of Entrance Tank Orifice
Pi_EtFlow[30] = 0.278388  # Ratio of the minimum flow divided by the maximum flow through the plant.
L_FlocEntryOrifice = 56.0732 cm  # Length of orifice entering into flocculator from Rapid Mix Unit
W_FlocEntryOrifice =  # error  # Height of orifice entering into flocculator
ED_Diffusion =  # error  # Minimum Energy Dissipation needed
HL_FlocEntryOrifice = 7.13979 cm  # Head loss caused by entering flocculation tank.
A_FlocEntry = ƒ(any1^7 · Length^-1 · Time^-2, any2) → any1^-2 · any2^-1  # Area required of entry port to flocculator
A_EtOrifice = 400.718 cm^2  # Area of Entrance Tank Orifice
HW_EtTotal = 2.68814 m  # Total Height of water at beginning of rapid mix unit
HW_Channel2 =  # error  # Height of water at the back of the entrance tank channel (from channel bottom)
HW_EtChannel = 7.66858 cm  # Height of Waterfall into flocculator
W_EtChannel = 39.401 cm  # Widt of entrance tank channel
Vol_Stock = 4050 L  # Volume of chemical stock tanks
# Elevations:
ZW_ExitChannel = 1.572 m  # Water Level at the end of the plant in the exit channel and exit channel box
HW_Sed = 1.612 m
HW_FlocStart = 2.19178 m  # Water level at the beginning of the floc tank
HL_Floc = 57.9781 cm  # just for ref. the head loss throught the floc tank
HW_EtTotal = 2.68814 m  # Height of the water in the entrance channel
# [reference: Materials List.xmcd]
L_LaunderPipe = 17.5154 m
N_Launders = 6
L_LaunderPipeTotal = 105.093 m
N_Valves = 3
N_LaunderCouplings = 6
N_ValveCouplings = 3
N_SedPlatesTotal = 2145
N_SedPlatesPerSheet = 11
N_SedPlateSheets = 195
N_PipeSedPlateStand =  # error
A_SedTank = 74.2997 m^2
# [reference: AutoCADMasterProgram.xmcd]
# AutoCAD References
AC_SedTank = [
    "_-view o t"; "-layer m tank"; "c t 132,132,132"; "tank"; "  "; "_-view o t _zoom w 0.16,-0.16,0 -19.21644,1.2395,1.712 _box 0,0,0 -19.05644,1.0795,1.712 _box 0.15,-0.15,-0.15 -19.20644,1.2295,1.712 _subtract 0.15,-0.15,-0.15  0,0,0 "; "-layer s 0"; "  "; "-layer f tank"; "  "
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]
AC_EntranceTank = [
    "-layer m entrancetank";
    "c t 214,214,214";
    "entrancetank";
    "  ";
    "_-view o t _zoom w 0.16,5.66069,0 -2.64424,8.46493,2.78814 _box 0,5.82069,0 -2.48424,8.30493,2.78814 _box 0.15,5.67069,-0.15 -2.63424,8.45493,2.78814 _subtract 0.15,5.67069,-0.15  0,5.82069,0 ";
    "-layer s 0";
    "  ";
    "-layer f entrancetank";
    "  ";
    "-layer s entrancetank";
    "  ";
    "_box -0.39401,5.67069,2.73814 0,5.82069,2.78814";
    "-layer s 0";
    "  ";
    "-layer t entrancetank";
    "  ";
    "_-view o t";
    "_subtract 0.15,5.82069,0  -0.39401,5.67069,2.73814 ";
    "-layer f entrancetank";
    "  "
]
AC_FlocTank = [
    "-layer m floctank"; "c t 91,91,91"; "floctank"; "  "; "_-view o t _zoom w 0.16,3.5285,0 -19.21644,5.83069,2.29178 _box 0,3.6885,0 -19.05644,5.67069,2.29178 _box 0.15,3.5385,-0.15 -19.20644,5.82069,2.29178 _subtract 0.15,3.5385,-0.15  0,3.6885,0 "; "-layer s 0"; "  "; "-layer f floctank"; "  "; "-layer m floctankwall"
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]
